# Title: MATHCAD 15 WORKSHEET
# Worksheet setting: ORIGIN = 1
# [area: REFERENCE FILES]
# [reference: Library of Constants and Units and Functions.xmcd]
# [reference: REF - NDAG Energy Group Boundaries -  1102N 709N 180N 172N 162PDAG 24G and 252N 238N 200N 56N 47G 19G.XMCD]
# [area: USER TEMPLATES]
# Special functions added to MathCAD:
#
# Z := 50  AMN := 113  ZAID := 1000*Z + AMN  isom := 0  symbol := "Sn"
#
# MMI_ZA(Z, AMN) = 112.905 gm/mol gives standard isotopic mass (gram/mole) for a (Z,A) combination
#
# MI_ZA(Z, AMN) = 1.87483e-22 gm gives standard isotopic mass for a (Z,A) combination
#
# MMI_ZAID(ZAID) = 112.905 gm/mol gives standard isotopic mass (gram/mole) for a ZAID value
#
# MI_ZAID(ZAID) = 1.87483e-22 gm gives standard isotopic mass for a ZAID value
#
# MME_Z(Z) = 118.71 gm/mol gives standard elemental mass (gram/mole) for a Z value
#
# ME_Z(Z) = 1.97123e-25 kg gives standard elemental mass for a Z value
#
# MME_symbol(symbol) = 118.71 gm/mol gives standard elemental mass (gram/mole) for a specific element symbol such as "Sn" or "K" or "Na".
#
# ME_symbol(symbol) = 1.97123e-22 gm gives standard elemental mass for a specific element symbol.
#
# Halflife: THALF_ZAID(ZAID) = 115.08 day gives the half-life (unit: seconds) for a specified ZAID.
#
# Halflife: THALF_ZAI(Z, AMN, isom) = 115.08 day gives the half-life (unit: seconds) for a specified (Z,A,isom).
#
# Halflife of 137mBa: THALF_ZAI(56, 137, 1) = 2.552 min
#
# Activity per unit mass of U-234: Act_um_ZAID(92234) = 230217494 Bq/gm
#
# Activity per unit mass of Th-232: Act_um_ZAI(90, 232, 0) = 4071.87 Bq/gm
#
# Activity per unit mass of Ba-137m: Act_um_ZAI(55, 137, 0) = 3.21629e12 Bq/gm
#
# AuM_ZAI(90, 232, 0) = 4071.87 Bq/gm
#
# Clearance levels for disposal of bulk quantities of radioactive material (IAEA BSS 2014):
#
# CL_ZAI(27, 60, 0) = 0.1 Bq*gm^-1
#
# CL_ZAID(27060) = 0.1 Bq*gm^-1
#
# Time-to-clearance
# Z := Z_Co  AMN := 60  ISOM := 0  AuM := 5500*Bq/gm
#
# TTCL_ZAI_AuM(Z, AMN, ISOM, AuM) = 83.0095 yr
#
# augment(Z_elements_stable, Symbol_elements_stable, Abundance_element_Z(Z_elements_stable)/ppm) = [ 1, "H", 1400; 2, "He", 0.008; 3, "Li", 22; 4, "Be", 3.1; 5, "B", 17; 6, "C", 3240; 7, "N", 83; 8, "O", 461000; 9, "F", 600; 10, "Ne", 0.0051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 ]
#
# Symbols:
#
# Symbol_Z(41) = "Nb"
#
# Symbol_ZA(41, 94) = "Nb-94"
#
# Symbol_ZAI(43, 99, 1) = "Tc-99m"
#
# By using these functions in work, improved values of:
# * Standard isotopic masses
# * Standard elemental masses
# * Halflives of radionuclides
# will automatically filter through all worksheets, when the updated values are put in the appropriate reference tables.
## Clearance levels for disposal of bulk quantities of radioactive material (IAEA BSS 2014):
CL_ZAI(27, 60, 0) = 0.1 Bq*gm^-1
CL_ZAID(27060) = 0.1 Bq*gm^-1
## Time-to-clearance:
Z := Z_Co
AMN := 60
ISOM := 0
AuM := 5500*Bq/gm
TTCL_ZAI_AuM(Z, AMN, ISOM, AuM) = 83.0095 yr
## Clearance Index (CI) quantification:
Z := [1; 20]
AMN := [3; 45]
ISOM := [0; 0]
AuM := [51; 51]*Bq/gm
CLI(Z, AMN, ISOM, AuM) = 1.02
## RS = Radiological Sentencing (verdict):
RS(Z, AMN, ISOM, AuM) = "Too radioactive for clearance"
# Terrestrial abundance, in upper continental crust of the planet Earth,
# of the stable and nearly stable elements:
Abundance_elements_Earth_UCC = [
    1, "H", 1400;
    2, "He", 0.008;
    3, "Li", 22;
    4, "Be", 3.1;
    5, "B", 17;
    6, "C", 3240;
    7, "N", 83;
    8, "O", 461000;
    9, "F", 600;
    10, "Ne", 0.0051
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]
Abundance_element_Z([7; 9; 11; 13]) = [8.3e-5; 0.0006; 0.02567; 0.0823]
Element[63] = "Eu"
Symbol[66] = "Dy"
Element_Z(55) = "Cs"
Z_symbol("Tb") = 65
Abundance_element_Z(Z_elements_stable) = [
    1400; 0.008; 22; 3.1; 17; 3240; 83; 461000; 600; 0.0051
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] ppm
Symbol_element_Z(8) = "O"
Element_symbol_Z(34) = "Se"
Symbol_element_Z(Z_elements) = [
    "H"; "He"; "Li"; "Be"; "B"; "C"; "N"; "O"; "F"; "Ne"
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]
Element_symbol_Z(Z_elements) = [
    "H"; "He"; "Li"; "Be"; "B"; "C"; "N"; "O"; "F"; "Ne"
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]
i_odd := 1, 3 .. 81
i_even := 2, 4 .. 82
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Abundance_element_Z(Z_Ag)/Abundance_element_Z(Z_Ir) = 3750
Abundance_element_Z(Z_Os)/Abundance_element_Z(Z_Ir) = 2.5
sum(Abundance_element_Z(i_even), i_even) = 87.1715 %
sum(Abundance_element_Z(i_odd), i_odd) = 13.3878 %
sum(Abundance_element_Z(i_even), i_even)/sum(Abundance_element_Z(i_odd), i_odd) = 6.51128
# Natural Terrestrial Abundance of Isotope in Element (ntaie)
ntaie_Z(Z_Sn) = [
    112, 0.00973;
    114, 0.00659;
    115, 0.00339;
    116, 0.14536;
    117, 0.07676;
    118, 0.24223;
    119, 0.08585;
    120, 0.32593;
    122, 0.04629;
    124, 0.05789
]
ntaie_ZA(Z_Sn, 117) = 7.676 %
ntaie_Z([6; 12; 20]) = [
    [12, 0.988922; 13, 0.011078]; [24, 0.78951; 25, 0.1002; 26, 0.11029]; [40, 0.96941; 42, 0.00647; 43, 0.00135; 44, 0.02086; 46, 4e-5; 48, 0.00187]
]
NAB_Z(Z_Sn) = [
    "Sn", 50, 112, 111.905, 50112, 0.00973;
    "Sn", 50, 114, 113.903, 50114, 0.00659;
    "Sn", 50, 115, 114.903, 50115, 0.00339;
    "Sn", 50, 116, 115.902, 50116, 0.14536;
    "Sn", 50, 117, 116.903, 50117, 0.07676;
    "Sn", 50, 118, 117.902, 50118, 0.24223;
    "Sn", 50, 119, 118.903, 50119, 0.08585;
    "Sn", 50, 120, 119.902, 50120, 0.32593;
    "Sn", 50, 122, 121.903, 50122, 0.04629;
    "Sn", 50, 124, 123.905, 50124, 0.05789
]
## Title
Y_pfg_dfg := [
    4.1011e-8; 7.63961e-8; 1.06966e-7; 3.10073e-9; 7.63961e-8; 4.41724e-9; 7.63961e-8; 9.00769e-9; 1.27753e-8; 7.63961e-8
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]
E_pfg_dfg := [
    0.0148; 0.03; 0.0314; 0.0453; 0.05; 0.0553; 0.07; 0.0753; 0.0853; 0.09
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]
0.00000009*%*2.0 = 1.8e-9
sum(Y_pfg_dfg) = 8.96093e-6
Y_sfn := 1.13022e-6
Y_FF := 1.09e-6
sum(Y_pfg_dfg)/Y_sfn = 7.92848
# Case: U-232
Y_U232_sfn := 1.89e-12
Y_sfn := Y_U232_sfn
8*Y_sfn*Y_pfg_dfg
